d_a := 0.076 m
d_i := 0.068 m
m_punkt_dichte := 500 kg/(m^2*s)
λ_W := 45 W/(m*K)
θ_F_ein := 200 °C
θ_s := 270 °C
α_a := 250 W/(m^2*K)
θ_a := 1100 °C
# Stoffwerte für Wasser Flüssigkeit bei 270 °C
c_p := 5126 J/(kg*K)
ρ_1 := 767.8 kg/m^3
λ_1 := 0.593 W/(m*K)
η_1 := 97.4*10^-6 kg/(m*s)
ν_1 := 0.127*10^-6 m^2/s
Pr_1 := 0.842
Δh_V := 1.6046*10^6 J/kg
p_s := 5.5051 MPa
σ := 0.02135 N/m
# Stoffwerte für Wasser Dampf bei 270 °C
ρ_2 := 28.061 kg/m^3
η_2 := 18.27*10^-6 kg/(m*s)
ν_2 := η_2/ρ_2 = 6.51082e-7 m^2/s
# Gebiet I)  einphasiger, konvektiver Wärmeübergang
Re := m_punkt_dichte*d_i/(ν_1*ρ_1) = 348680
ξ := (1.8*log(Re, 10) - 1.5)^-2 = 0.0139181
Nu := (ξ/8)*Re*Pr_1/(1 + 12.7*sqrt(ξ/8)*(Pr_1^(2/3) - 1)) = 541.868
α_i1 := Nu*λ_1/d_i = 4725.4 W/(m^2*K)
R := d_i/(d_a*α_a) + d_i/(2*λ_W)*ln(d_a/d_i) = 0.00366298 m^2*K/W
q_punkt := (θ_a - θ_s)/R = 226591 W/m^2
# q_punkt=const. !
q_punkt == α_i1*(θ_s - θ_F_aus)
θ_F_aus := θ_s - q_punkt/α_i1 = 222.048 °C
# Gebiet II) unterkühltes Sieden (Blasen bilden sich an Wand, aber Fluid noch nicht bei Siedetemperatur)
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# Wandtemperatur unbekannt -> iterativ an den Wärmeübergangskoeefizient
θ_F_m := (θ_F_aus + θ_s)/2 = 246.024 °C
θ_W_0 := 280 °C
α_BS := 77.8 W/(m^2 K)*((θ_W_0 - θ_s)/K)^2.57*(p_s/MPa)^0.857 = 124685 W/(m^2 K)
α_i2 := sqrt(α_i1^2 + (α_BS*(θ_W_0 - θ_s)/(θ_W_0 - θ_F_m))^2) = 37001.2 W/(m^2 K)
θ_W_1 == θ_F_m + q_punkt/α_i2  # iterativ lösen siehe Excel Studium Repository WSÜ  # gelöst mit Daten->Was-Wäre-Wenn-Analyse
θ_W_II := 275.79 °C
α_BS_II := 30662.36 W/(m^2 K)
# Gebiet III) Sieden in gesättigter Flüssigkeit
# analag zu Gebiet II: mit ein paar Veränderungen
θ_W_0 := 275 °C
α_i3 == (α_ZP^2.5 + α_BS^2.5)^0.4
α_ZP := 0  # vernachlässigbar klein
α_i3 == α_BS
θ_W_1 == θ_s + q_punkt/α_i3  # iterativ lösen siehe Excel Studium Repository WSÜ  # gelöst mit Daten->Was-Wäre-Wenn-Analyse
θ_W_III := 276.20 °C
α_BS_III := 36537.22 W/(m^2 K)
# Längen
m_punkt := m_punkt_dichte*π/4*d_i^2 = 1.81584 kg/s
# Gebiet I)
Q_punkt_I := m_punkt*c_p*(θ_F_aus - θ_F_ein) = 205225 W
A_I == π*d_i*L_1
Q_punkt_I == q_punkt*A_I
L_1 := Q_punkt_I/(π*d_i*q_punkt) = 4.23964 m
# Gebiet II)
Q_punkt_II := m_punkt*c_p*(θ_s - θ_F_aus) = 446334 W
A_II == π*d_i*L_2
Q_punkt_II == q_punkt*A_II
L_2 := Q_punkt_II/(π*d_i*q_punkt) = 9.22059 m
# Gebiet III)
x_A := 0.2
x_E := 0
Q_punkt_III := m_punkt*(x_A - x_E)*Δh_V = 582740 W
A_III == π*d_i*L_3
Q_punkt_III == q_punkt*A_III
L_3 := Q_punkt_III/(π*d_i*q_punkt) = 12.0385 m
L := L_1 + L_2 + L_3 = 25.4987 m
