d_a := 0.018 m
θ_2_ein := (60 + 273.15) K
Δh_V := 2230.5*10^3 J/kg
d_i := 0.016 m
θ_2_aus := (100 + 273.15) K
θ_s := (110 + 273.15) K
λ_w := 50 W/(m*K)
λ_ss := 1 W/(m*K)
m_2_punkt := 0.05 kg/s
δ_ss := 0.1*10^-3 m
θ_2_m := 0.5*(θ_2_ein + θ_2_aus) = 80 °C
ν_2 := 0.365*10^-6 m^2/s
ρ_2 := 971.6 kg/m^3
Pr := 2.234
λ_2 := 0.667 W/(m*K)
c_p := 4197 J/(kg*K)
Re := m_2_punkt*4/(π*d_i*ν_2*ρ_2) = 11219.7
ξ := (1.8*log(Re, 10) - 1.5)^-2 = 0.0298297
Nu := (ξ/8)*Re*Pr/(1 + 12.7*sqrt(ξ/8)*(Pr^(2/3) - 1)) = 60.3051
α_i := Nu*λ_2/d_i = 2513.97 W/(m^2*K)
ν_f := 0.268*10^-6 m^2/s
ρ_f := 950.7 kg/m^3
λ_f := 0.681 W/(m*K)
g := 9.81 m/s^2
ΔT_s := θ_s - θ_2_m = 30 K
α_a(L_R) := 4/3*(λ_f^3*ρ_f*g*Δh_V/(4*ν_f*ΔT_s*L_R))^(1/4)
Q_punkt := m_2_punkt*c_p*(θ_2_aus - θ_2_ein) = 8394 W
R_i(L_R) := 1/(α_i*π*d_i*L_R)
R_ss(L_R) := δ_ss/(λ_ss*π*d_i*L_R)
R_w(L_R) := ln(d_a/d_i)/(2*π*λ_w*L_R)
R_a(L_R) := 1/(α_a(L_R)*π*d_a*L_R)
ΔT_m := (θ_2_aus - θ_2_ein)/ln((θ_2_ein - θ_s)/(θ_2_aus - θ_s)) = 24.8534 K
L_R := 4.17 m
ΔT_m/(R_i(L_R) + R_w(L_R) + R_ss(L_R) + R_a(L_R)) = 6777.73 W
